// This file is to define the line configurations, including the series resistance matrix, series reactance matrix, and shunt nodal capacitance matrix with a variety of phase configurations.
// For the linecode name, OH denotes overhead, UG denotes underground, 1p denotes 1 phase, 3p denotes 3 phases, "type+number" denotes conductor type.

//--------------------------------------------------------------------------------------//
//            three-phase overhead line using type 1 overhead conductor
//--------------------------------------------------------------------------------------//
New LineCode.OH_3p_type1 nphases= 3 Units= mi    			  ! Configuration name, number of phases, unit
 ~ Rmatrix= (0.615927 | 0.170927 0.615927 | 0.170927 0.170927 0.615927 )  ! Series resistance matrix
 ~ Xmatrix= (1.209389 | 0.433188 1.209389 | 0.433188 0.433188 1.209389 )  ! Series reactance matrix


//--------------------------------------------------------------------------------------//
//            two-phase overhead line using type 2 overhead conductor
//--------------------------------------------------------------------------------------//
New LineCode.OH_2p_type2 nphases= 2 Units= mi
 ~ Rmatrix= (0.589255 | 0.169495 0.589255 )
 ~ Xmatrix= (1.074856 | 0.387876 1.074856 )


//--------------------------------------------------------------------------------------//
//            one-phase overhead line using type 2 overhead conductor
//--------------------------------------------------------------------------------------//
New LineCode.OH_1p_type2 nphases= 1 Units= mi
 ~ Rmatrix= (0.592473 )
 ~ Xmatrix= (1.065821 )


//--------------------------------------------------------------------------------------//
//           three-phase overhead line using type 5 overhead conductor
//--------------------------------------------------------------------------------------//
New LineCode.OH_3p_type5 nphases= 3 Units= mi
 ~ Rmatrix= (1.191602 | 0.234849 1.191602 | 0.234849 0.234849 1.191602 )
 ~ Xmatrix= (1.209452 | 0.489263 1.209452 | 0.489263 0.489263 1.209452 )


//--------------------------------------------------------------------------------------//
//           one-phase overhead line using type 5 overhead conductor
//--------------------------------------------------------------------------------------//
New LineCode.OH_1p_type5 nphases= 1 Units= mi
 ~ Rmatrix= (1.194260 )
 ~ Xmatrix= (1.205420 )


//--------------------------------------------------------------------------------------//
//           three-phase underground cable using type 1 underground conductor
//--------------------------------------------------------------------------------------//
New LineCode.UG_3p_type1 nphases= 3 Units= mi
 ~ Rmatrix= (1.009423 | 0.409732 1.009423 | 0.409732 0.409732 1.009423 )
 ~ Xmatrix= (0.493164 | 0.100849 0.493164 | 0.100849 0.100849 0.493164 )
 ~ Cmatrix= (286.101593 | 0.000000 286.101593 | 0.000000 0.000000 286.101593 )     ! Shunt nodal capacitance matrix


//--------------------------------------------------------------------------------------//
//           three-phase underground cable using type 2 underground conductor
//--------------------------------------------------------------------------------------//
New LineCode.UG_3p_type2 nphases= 3 Units= mi
 ~ Rmatrix= (1.692577 | 0.550087 1.692577 | 0.550087 0.550087 1.692577 )
 ~ Xmatrix= (0.791756 | 0.344931 0.791756 | 0.344931 0.344931 0.791756 )
 ~ Cmatrix= (207.880539 | 0.000000 207.880539 | 0.000000 0.000000 207.880539 )


//--------------------------------------------------------------------------------------//
//            one-phase underground cable using type 2 underground conductor
//--------------------------------------------------------------------------------------//
New LineCode.UG_1p_type2 nphases= 1 Units= mi
 ~ Rmatrix= (1.675338 )
 ~ Xmatrix= (1.210007 )
 ~ Cmatrix= (207.880539 )


//--------------------------------------------------------------------------------------//
//            line repersenting transformer windings=2 kva=112.5
//--------------------------------------------------------------------------------------//
New LineCode.T_type1 nphases= 3 Units= Ft
 ~ Rmatrix= (41.13504 | 0 41.13504 | 0 0 41.13504 )
 ~ Xmatrix= (65.51136 | 0 65.51136 | 0 0 65.51136 )


//--------------------------------------------------------------------------------------//
//            line repersenting transformer windings=2 kva=75.0
//--------------------------------------------------------------------------------------//
New LineCode.T_type2 nphases= 3 Units= Ft
 ~ Rmatrix= (57.63984 | 0 57.63984 | 0 0 57.63984 )
 ~ Xmatrix= (48.49872 | 0 48.49872 | 0 0 48.49872 )


//--------------------------------------------------------------------------------------//
//            line repersenting transformer windings=99 kva=75.0
//--------------------------------------------------------------------------------------//
New LineCode.T_type3 nphases= 1 Units= Ft
 ~ Rmatrix= (25.392 )
 ~ Xmatrix= (53.3232)


//--------------------------------------------------------------------------------------//
//            line repersenting transformer windings=99 kva=25.0
//--------------------------------------------------------------------------------------//
New LineCode.T_type4 nphases= 1 Units= Ft
 ~ Rmatrix= (101.31408 )
 ~ Xmatrix= (143.21088)


//--------------------------------------------------------------------------------------//
//            line repersenting transformer windings=2 kva=45.0
//--------------------------------------------------------------------------------------//
New LineCode.T_type5 nphases= 3 Units= Ft
 ~ Rmatrix= (106.6464 | 0 106.6464 | 0 0 106.6464 )
 ~ Xmatrix= (73.2136 | 0 73.2136 | 0 0 73.2136 )


//--------------------------------------------------------------------------------------//
//            line repersenting transformer windings=3 kva=25.0
//--------------------------------------------------------------------------------------//
New LineCode.T_type6 nphases= 1 Units= Ft
 ~ Rmatrix= (33.773617 )
 ~ Xmatrix= (35.805113)


//--------------------------------------------------------------------------------------//
//            line repersenting transformer windings=3 kva=37.5
//--------------------------------------------------------------------------------------//
New LineCode.T_type7 nphases= 1 Units= Ft
 ~ Rmatrix= (20.145667 )
 ~ Xmatrix= (21.965548)


//--------------------------------------------------------------------------------------//
//            line repersenting transformer windings=3 kva=50.0
//--------------------------------------------------------------------------------------//
New LineCode.T_type8 nphases= 1 Units= Ft
 ~ Rmatrix= (13.966534 )
 ~ Xmatrix= (17.140746)


//--------------------------------------------------------------------------------------//
//            line repersenting transformer windings=2 kva=300.0
//--------------------------------------------------------------------------------------//
New LineCode.T_type9 nphases= 3 Units= Ft
 ~ Rmatrix= (11.4264 | 0 11.4264 | 0 0 11.4264 )
 ~ Xmatrix= (28.566 | 0 28.566 | 0 0 28.566 )


//--------------------------------------------------------------------------------------//
//            line repersenting transformer windings=3 kva=15.0
//--------------------------------------------------------------------------------------//
New LineCode.T_type10 nphases= 1 Units= Ft
 ~ Rmatrix= (70.255896 )
 ~ Xmatrix= (40.629916)


//--------------------------------------------------------------------------------------//
//            line repersenting transformer windings=2 kva=225.0
//--------------------------------------------------------------------------------------//
New LineCode.T_type11 nphases= 3 Units= Ft
 ~ Rmatrix= (18.6208 | 0 18.6208 | 0 0 18.6208 )
 ~ Xmatrix= (39.3576 | 0 39.3576 | 0 0 39.3576 )


//--------------------------------------------------------------------------------------//
//            line repersenting transformer windings=3 kva=100.0
//--------------------------------------------------------------------------------------//
New LineCode.T_type12 nphases= 1 Units= Ft
 ~ Rmatrix= (7.110235 )
 ~ Xmatrix= (10.665353)


//--------------------------------------------------------------------------------------//
//            line repersenting transformer windings=2 kva=500.0
//--------------------------------------------------------------------------------------//
New LineCode.T_type13 nphases= 3 Units= Ft
 ~ Rmatrix= (6.09408 | 0 6.09408 | 0 0 6.09408 )
 ~ Xmatrix= (22.47192 | 0 22.47192 | 0 0 22.47192 )
